AnyFloat RightHipForces = .JointReactionForces.RightHipForceInThighCoordinateSystem;
AnyFloat RightKneeForces = .JointReactionForces.RightKneeForceInShankCoordinateSystem;
AnyFloat RightAnkleForces = .JointReactionForces.RightAnkleForceInFootCoordinateSystem;

AnyFloat LeftHipForces = .JointReactionForces.LeftHipForceInThighCoordinateSystem;
AnyFloat LeftKneeForces = .JointReactionForces.LeftKneeForceInShankCoordinateSystem;
AnyFloat LeftAnkleForces = .JointReactionForces.LeftAnkleForceInFootCoordinateSystem;

AnyFloat RightHipForcesPelvisFrame = .JointReactionForces.RightHipForceInPelvisCoordinateSystem;
AnyFloat LeftHipForcesPelvisFrame = .JointReactionForces.LeftHipForceInPelvisCoordinateSystem;
