#class_template CreateJointMeasures (PELVIS_FRAME,THIGH_FRAME,SHANK_FRAME,FOOT_FRAME){

  #var AnyInt Sign = 1;
  AnyKinMeasureNormComb HipFlexion = {
    AnyKinRotational HipMeasure ={
      AnyRefFrame &PelvisRef = ...PELVIS_FRAME ;
      AnyRefFrame &ThighRef = ...THIGH_FRAME ;
      Type=RotAxesAngles;
      Axis1 = z; Axis2 = x; Axis3 = y;
    };
    Order = 1;
    Weight ={1,0,0}*180/pi;
  };
  AnyKinMeasureNormComb HipAbduction = {
    AnyKinRotational &HipJoint =.HipFlexion.HipMeasure;
    Order = 1;
    Weight =.Sign *{0,1,0}*180/pi;
  };
  AnyKinMeasureNormComb HipExternalRotation ={

    AnyKinRotational &HipJoint =.HipFlexion.HipMeasure;
    Order = 1;
    Weight =-1*.Sign *{0,0,1}*180/pi;
  };

  AnyKinMeasureNormComb KneeFlexion = {
    AnyKinRotational KinRot ={
      AnyRefFrame &ThighRef = ...THIGH_FRAME;
      AnyRefFrame &ShankRef = ...SHANK_FRAME;
      Type=RotAxesAngles;
      Axis1 = z; Axis2 = x; Axis3 = y;
    };
    Order = 1;
    Weight =-1*{1,0,0}*180/pi;
  };

  AnyKinMeasureNormComb AnklePlantarFlexion = {
    AnyKinRotational KinRot ={
      AnyRefFrame &ShankRef = ...SHANK_FRAME;
      AnyRefFrame &FootRef = ...FOOT_FRAME;
      Type=RotAxesAngles;
      Axis1 = z; Axis2 = y; Axis3 = x;
    };
    Order = 1;
    Weight =-1*{1,0,0}*180/pi;
  };
  AnyKinMeasureNormComb AnkleAbduction = {
    AnyKinRotational &KinRot =.AnklePlantarFlexion.KinRot;
    Order = 1;
    Weight =-.Sign *{0,1,0}*180/pi;
  };
  AnyKinMeasureNormComb AnkleEversion ={
    AnyKinRotational &KinRot =.AnklePlantarFlexion.KinRot;
    Order = 1;
    Weight =-1*.Sign *{0,0,1}*180/pi;
  };


};

#class_template CreateJointAnglesAndMomentMeasures (PELVIS_FRAME,THIGH_FRAME,SHANK_FRAME,FOOT_FRAME, HIPMOMENT, KNEEMOMENT, ANKLEMOMENT  ){

  #var AnyInt Sign = 1;
  AnyKinMeasureNormComb HipFlexion = {
    AnyVar M_Projected = ..PELVIS_FRAME.Axes'[2]*..HIPMOMENT';
    AnyKinRotational HipMeasure ={
      AnyRefFrame &PelvisRef = ...PELVIS_FRAME ;
      AnyRefFrame &ThighRef = ...THIGH_FRAME ;
      Type=RotAxesAngles;
      Axis1 = z; Axis2 = x; Axis3 = y;
    };
    Order = 1;
    Weight ={1,0,0}*180/pi;
  };
  AnyKinMeasureNormComb HipAbduction = {
    AnyVar M_Projected = .Sign*cross(..PELVIS_FRAME.Axes'[2],..THIGH_FRAME.Axes'[1])*..HIPMOMENT';
    AnyKinRotational &HipJoint =.HipFlexion.HipMeasure;
    Order = 1;
    Weight =.Sign *{0,1,0}*180/pi;
  };
  AnyKinMeasureNormComb HipExternalRotation ={
    AnyVar M_Projected = -1*.Sign*..THIGH_FRAME.Axes'[1]*..HIPMOMENT';
    AnyKinRotational &HipJoint =.HipFlexion.HipMeasure;
    Order = 1;
    Weight =-1*.Sign *{0,0,1}*180/pi;
  };

  AnyKinMeasureNormComb KneeFlexion = {
    AnyVar M_Projected = -..THIGH_FRAME.Axes'[2]*..KNEEMOMENT';
    AnyKinRotational KinRot ={
      AnyRefFrame &ThighRef = ...THIGH_FRAME;
      AnyRefFrame &ShankRef = ...SHANK_FRAME;
      Type=RotAxesAngles;
      Axis1 = z; Axis2 = x; Axis3 = y;
    };
    Order = 1;
    Weight =-1*{1,0,0}*180/pi;
  };
  AnyKinMeasureNormComb KneeAbduction = {
    AnyVar M_Projected = .Sign*cross(..THIGH_FRAME.Axes'[2], ..SHANK_FRAME.Axes'[1])*..KNEEMOMENT';
    AnyKinRotational &KinRot = .KneeFlexion.KinRot;
    Order = 1;
    Weight =.Sign *{0,1,0}*180/pi;
  };
  AnyKinMeasureNormComb KneeExternalRotation = {
    AnyVar M_Projected = -1*.Sign*..SHANK_FRAME.Axes'[1]*..KNEEMOMENT';
    AnyKinRotational &KinRot = .KneeFlexion.KinRot;
    Order = 1;
    Weight =-1*.Sign *{0,0,1}*180/pi;
  };


  AnyKinMeasureNormComb AnklePlantarFlexion = {
    AnyVar M_Projected = ..SHANK_FRAME.Axes'[2]*..ANKLEMOMENT';
    AnyKinRotational KinRot ={
      AnyRefFrame &ShankRef = ...SHANK_FRAME;
      AnyRefFrame &FootRef = ...FOOT_FRAME;
      Type=RotAxesAngles;
      Axis1 = z; Axis2 = y; Axis3 = x;
    };
    Order = 1;
    Weight =-1*{1,0,0}*180/pi;
  };
  AnyKinMeasureNormComb AnkleAbduction = {
    AnyVar M_Projected = -1*.Sign*cross(..SHANK_FRAME.Axes'[2],..FOOT_FRAME.Axes'[0])*..ANKLEMOMENT';
    AnyKinRotational &KinRot =.AnklePlantarFlexion.KinRot;
    Order = 1;
    Weight =-.Sign *{0,1,0}*180/pi;
  };
  AnyKinMeasureNormComb AnkleEversion ={
    AnyVar M_Projected = -1*.Sign*..FOOT_FRAME.Axes'[0]*..ANKLEMOMENT';
    AnyKinRotational &KinRot =.AnklePlantarFlexion.KinRot;
    Order = 1;
    Weight =-1*.Sign *{0,0,1}*180/pi;
  };

  AnyFolder ProjectedMoments = {
  AnyVar HipFlexion = ..PELVIS_FRAME.Axes'[2]*..HIPMOMENT';
  AnyVar HipAbduction = .Sign*cross(..PELVIS_FRAME.Axes'[2],..THIGH_FRAME.Axes'[1])*..HIPMOMENT';
  AnyVar HipExternalRotation = -1*.Sign*..THIGH_FRAME.Axes'[1]*..HIPMOMENT';

  AnyVar KneeFlexion = -..THIGH_FRAME.Axes'[2]*..KNEEMOMENT';
  AnyVar KneeAbduction = .Sign*cross(..THIGH_FRAME.Axes'[2], ..SHANK_FRAME.Axes'[1])*..KNEEMOMENT';
  AnyVar KneeExternalRotation = -1*.Sign*..SHANK_FRAME.Axes'[1]*..KNEEMOMENT';

  AnyVar AnkleFlexion = ..SHANK_FRAME.Axes'[2]*..ANKLEMOMENT';
  AnyVar AnkleAbduction = -1*.Sign*cross(..SHANK_FRAME.Axes'[2],..FOOT_FRAME.Axes'[0])*..ANKLEMOMENT';
  AnyVar AnkleExternalRotation = -1*.Sign*..FOOT_FRAME.Axes'[0]*..ANKLEMOMENT';
};


};
