#ifndef PREMAININCLUDES_ANY
#define PREMAININCLUDES_ANY

#ifndef PROJECT_FOLDER_NAME
#define PROJECT_FOLDER_NAME Kinematic_Scaled_Model
#endif

#path BASE_MODEL_PATH "."
#path PROJECT_PATH "../.."

#path SHARED_FILES_PATH "../SharedFiles"

#ifndef AMMR_PATH
#path AMMR_PATH "../../../../.."
#endif

#ifndef H5_OUTPUT
#path H5_OUTPUT "../Output"
#endif

#ifndef TEMP_FILE_PATH
#path TEMP_FILE_PATH "Tmp"
#endif

#include "<AMMR_PATH>/Body/AAUHuman/ToolBox/Mocap/CreateMarkerClass.any"
#include "<AMMR_PATH>/Body/AAUHuman/ToolBox/Mocap/CreateMarkerClassTD.any"
#include "<AMMR_PATH>/Body/AAUHuman/ToolBox/Mocap/CreateMarkerClassTDWidgetV2.any"
//#include "ForcePlateGrandChallenge.any"
#include "<AMMR_PATH>/Body/AAUHuman/ToolBox/Mocap/ForcePlateType2AutoDetection.any"
#include "<AMMR_PATH>/Body/AAUHuman/ToolBox/Mocap/ForcePlateType2.any"
#include "<AMMR_PATH>/Body/AAUHuman/ToolBox/Mocap/OptimizeAnthropometricsOnOff.any"
#include "KinOptModel\ClassTemplates.any"
#include "<SHARED_FILES_PATH>/EmgProcessing.any"
#include "<SHARED_FILES_PATH>/AnatomicalJointAnglesTemplate.any"
//#include "MomentArmTemplate.any"
//#include "EmulateC3DMacros.any"


#endif
