#define  MotionAndParameterOptimizationModel 0
#define InverseDynamicModel 1
#define HumanModelPresent 1
#define LoadInverseDynamicModel
#define SaveAllResults

Main = {
  #include "ModelSetup.any"

  AnyProject Project = {
  #include "<PROJECT_PATH>/Subjects/TrialSelector.any"
  };
  //  Run the operation InverseDynamicAnalysisSequence to calibrate the model and run inverse dynamic analysis.
  AnyOperationMacro InverseDynamicAnalysisSequence = {
    MacroStr={
      "classoperation Main.Studies.LoadParametersOptimizationResults" + " " + strquote("Load design") + " --file=" + strquote(FilePathCompleteOf(Main.ModelSetup.FileNames.OptimizedParameters )),
      "classoperation Main" + strformat("\x22")+ "Update Values" + strformat("\x22"),
      "operation Main.Studies.HumanModel.Calibration.CalibrationSequence",
      "run",
      "operation Main.Studies.InverseDynamicStudy.StickFigureJointAngles.LoadStaticFrames",
      "run",
      "operation Main.Studies.InverseDynamicStudy.InverseDynamics",
      "run"
    };
  };

  AnyOperationMacro SaveResults = {
    MacroStr={
    "classoperation Main.Studies.InverseDynamicStudy.Output" + " " + strquote("Save data") + " --file=" + strquote(FilePathCompleteOf(Main.ModelSetup.FileNames.Results )) + " --type=Deep"
    };
  };

   AnyOperationMacro LoadResults = {
    MacroStr={
     "classoperation Main.Studies.LoadParametersOptimizationResults" + strquote("Load design")+ " --file="+ strquote(FilePathCompleteOf(Main.ModelSetup.FileNames.OptimizedParameters) ),
     "classoperation Main" + strquote("Update Values"),
     "classoperation Main.Studies.InverseDynamicStudy.Output" + " " + strquote("Load data") + " --file=" + strquote(FilePathCompleteOf(Main.ModelSetup.FileNames.Results ))

   };
  };

  #include "DrawSettings.any"

  AnyFolder Studies ={

    //This study is used for running the inverse dynamic analysis of the optimized motion
    //***********************************************************************************
    HumanModel={
      AnyFolder &Mannequin=.InverseDynamicStudy.Mannequin;
      #include  "BodyPartsSetupInv.any"
    };
    #include "HumanModel.any"

    AnyBodyStudy InverseDynamicStudy = {
      AnyFolder &C3DData=..ModelSetup.C3DFileData ;
      AnyFolder HumanModel = {
         AnyFolder &BodyModel=..HumanModel.BodyModel;
      };
      #include "Mannequin.any"

      // Includes Analog data (EMG and Kneeforces) from the
      // C3D structure in the output structure
      #include "ValidationOutput.any"

//  #if GrandChallageDataSet == 2012
      #include "InstrumentedKnee.any"
//  #else
//      #include "InstrumentedRightKnee.any"
//  #endif
    #include "JointAnglesAndMoments.any"

      //Environment around the human
      AnyFolder EnvironmentModel ={

        AnyFolder DrawC3DMarkers = {};
        AnyFolder &BodyModelRef=..HumanModel.BodyModel;
        #include "Environment.any"
      };

      //Connection between environment and the human
      AnyFolder ModelEnvironmentConnection = {
        #include "JointsAndDriversOptimized.any"
      };

      Gravity ={0.0, 0, -9.82};

      tStart = Main.ModelSetup.tStart;
      tEnd = Main.ModelSetup.tEnd;
      nStep = Main.ModelSetup.nStep;

      InverseDynamics.Criterion.Type = MR_MinMaxStrict;
      InverseDynamics.Criterion.UpperBoundOnOff=Off;
      InitialConditions.SolverType = KinSolDeterminate;
      Kinematics.SolverType = KinSolDeterminate;
    };


    //This study is only used for loading the optimized parameters
    AnyOptKinStudy LoadParametersOptimizationResults =     {
      AnyFolder &Study = .InverseDynamicStudy;
      AnyFolder &HumanModel = .HumanModel;
      ParameterOptimization.ConvergenceTol=1e-3;
      Analysis =   {
        AnyOperation &ref = .Study.Kinematics;
      };
    };


  };


}; //Main
#undef MotionAndParameterOptimizationModel
#undef InverseDynamicModel
#undef LoadInverseDynamicModel
#undef SaveAllResults
