#include "PreMainIncludes.any"


#include "../KinematicModel.main.any"


Main.Studies = {
  AnyBodyStudy StaticStudy = {
    AnyFolder &C3DData=..ModelSetup.C3DFileData ;
    AnyFolder HumanModel = {
      AnyFolder &BodyModel=..KinematicStudyForParameterIdentification.BodyModel;
    };
    AnyFolder &ModelOptimizationModel=.KinematicStudyForParameterIdentification;
    AnyFolder &JointAngleOutput=.KinematicStudyForParameterIdentification.JointAngleOutputs;
    AnyFolder &Markers = ModelOptimizationModel.ModelEnvironmentConnection.Drivers;

//    #include "../AnatomicalJointAngles.any"
    InitialConditions.PosAnalysisOnlyOnOff=On;
    Kinematics.PosAnalysisOnlyOnOff=On;
    nStep=1;
    Gravity = { 0.0, -9.81,0};
    tStart = (Main.ModelSetup.C3DFileData.Header.FirstFrameNo+Main.SubjectSpecificData.StaticFrameIndex)/
              Main.ModelSetup.C3DFileData.Header.VideoFrameRate;
    tEnd = tStart;

    InitialConditions.SolverType = KinSolOverDeterminate;
    Kinematics.SolverType = KinSolOverDeterminate;

    AnyFolder StaticPos = {
      AnyVec3 RAsis = Main.ModelSetup.C3DFileData.Points.Markers.RAsis.PosInterpol(.t);
      AnyVec3 LAsis = Main.ModelSetup.C3DFileData.Points.Markers.LAsis.PosInterpol(.t);
      AnyVec3 RPsis = Main.ModelSetup.C3DFileData.Points.Markers.RPsis.PosInterpol(.t);
      AnyVec3 LPsis = Main.ModelSetup.C3DFileData.Points.Markers.LPsis.PosInterpol(.t);

      AnyVec3 RKneeLateral = Main.ModelSetup.C3DFileData.Points.Markers.RKneeLateral.PosInterpol(.t);
      AnyVec3 RKneeMedial = Main.ModelSetup.C3DFileData.Points.Markers.RKneeMedial.PosInterpol(.t);
      AnyVec3 RAnkleLateral = Main.ModelSetup.C3DFileData.Points.Markers.RAnkleLateral.PosInterpol(.t);
      AnyVec3 RAnkleMedial= Main.ModelSetup.C3DFileData.Points.Markers.RAnkleMedial.PosInterpol(.t);
      AnyVec3 RToe = Main.ModelSetup.C3DFileData.Points.Markers.RToe.PosInterpol(.t);
      AnyVec3 RHeel = Main.ModelSetup.C3DFileData.Points.Markers.RHeel.PosInterpol(.t);

      AnyVec3 LKneeLateral = Main.ModelSetup.C3DFileData.Points.Markers.LKneeLateral.PosInterpol(.t);
      AnyVec3 LKneeMedial = Main.ModelSetup.C3DFileData.Points.Markers.LKneeMedial.PosInterpol(.t);
      AnyVec3 LAnkleLateral = Main.ModelSetup.C3DFileData.Points.Markers.LAnkleLateral.PosInterpol(.t);
      AnyVec3 LAnkleMedial= Main.ModelSetup.C3DFileData.Points.Markers.LAnkleMedial.PosInterpol(.t);
      AnyVec3 LToe = Main.ModelSetup.C3DFileData.Points.Markers.LToe.PosInterpol(.t);
      AnyVec3 LHeel = Main.ModelSetup.C3DFileData.Points.Markers.LHeel.PosInterpol(.t);

      // The Hip Joint positions are calcualted with the Harrington methods. Similar to the
      // stickfigure values in the other models
      AnyVar PelvisDepth = vnorm((RAsis+LAsis)/2-(LPsis+RPsis)/2);
      AnyVar AsisDist = vnorm(RAsis -LAsis);
      AnyVec3 RHipJointGlobal = (RAsis+LAsis)/2+
                          {(-0.24*PelvisDepth*1000-9.9)/1000,
                           (-0.16*AsisDist*1000-0.04*vnorm(RAsis - RAnkleMedial)*1000-7.1)/1000,
                           (0.28*PelvisDepth*1000+0.16*AsisDist*1000+7.9)/1000}
                           *PelvisGlobal';

      AnyVec3 LHipJointGlobal = (RAsis+LAsis)/2+
                           {(-0.24*PelvisDepth*1000-9.9)/1000,
                           (-0.16*AsisDist*1000-0.04*vnorm(LAsis - LAnkleMedial)*1000-7.1)/1000,
                           -(0.28*PelvisDepth*1000+0.16*AsisDist*1000+7.9)/1000}
                         *PelvisGlobal';

     // See ISB recommendation for the definition of these anatomical coordinate systems
     AnyMat33 PelvisGlobal = RotMat((RAsis+LAsis)*0.5,
                                     (RAsis+LAsis)*0.5+ ((RAsis+LAsis)*0.5-(RPsis+LPsis)*0.5 ),
                                     RAsis)*RotMat(-pi/2,x);
     AnyMat33 RHipThighGlobal = RotMat((RKneeLateral + RKneeMedial)/2,
                                     RHipJointGlobal,
                                     RKneeLateral)*RotMat(-pi/2,z)*RotMat(-pi/2,y);
     AnyMat33 RKneeThighGlobal = RotMat((RKneeLateral + RKneeMedial)/2,
                                     RKneeLateral,
                                     RHipJointGlobal)*RotMat(pi/2,y);
     AnyMat33 RKneeShankGlobal = RotMat((RKneeLateral + RKneeMedial)/2,
                                     RKneeLateral,
                                     (RAnkleLateral + RAnkleMedial)/2 )*RotMat(pi,x)*RotMat(pi/2,y);
     AnyMat33 RAnkleShankGlobal = RotMat((RAnkleLateral + RAnkleMedial)/2,
                                     RAnkleLateral,
                                     (RKneeLateral+RKneeMedial)/2 )*RotMat(pi/2,y);
     AnyMat33 RAnkleFootGlobal = RotMat((RKneeLateral + RKneeMedial)/2,
                                   (RAnkleLateral + RAnkleMedial)/2,
                                   RKneeLateral)
                                   *RotMat(pi/2,z)*RotMat(pi/2,y);

     // See ISB recommendation for the definition of these anatomical coordinate systems
     AnyMat33 LHipThighGlobal = RotMat((LKneeLateral + LKneeMedial)/2,
                                     LHipJointGlobal,
                                     LKneeMedial)*RotMat(-pi/2,z)*RotMat(-pi/2,y);
     AnyMat33 LKneeThighGlobal = RotMat((LKneeLateral + LKneeMedial)/2,
                                     LKneeMedial,
                                     LHipJointGlobal)*RotMat(pi/2,y);
     AnyMat33 LKneeShankGlobal = RotMat((LKneeLateral + LKneeMedial)/2,
                                     LKneeMedial,
                                     (LAnkleLateral + LAnkleMedial)/2 )*RotMat(pi,x)*RotMat(pi/2,y);
     AnyMat33 LAnkleShankGlobal = RotMat((LAnkleLateral + LAnkleMedial)/2,
                                     LAnkleMedial,
                                     (LKneeLateral+LKneeMedial)/2 )*RotMat(pi/2,y);
     AnyMat33 LAnkleFootGlobal = RotMat((LKneeLateral + LKneeMedial)/2,
                                   (LAnkleLateral + LAnkleMedial)/2,
                                   LKneeMedial)
                                   *RotMat(pi/2,z)*RotMat(pi/2,y);

     AnyFolder &BodyRef = .HumanModel.BodyModel;
     AnyMat33 PelvisMarkerFrame = BodyRef.Trunk.SegmentsLumbar.PelvisSeg.Axes'*PelvisGlobal;
     AnyMat33 RHipThighMarkerFrame = BodyRef.Right.Leg.Seg.Thigh.Axes'*RHipThighGlobal;
     AnyMat33 RKneeThighMarkerFrame = BodyRef.Right.Leg.Seg.Thigh.Axes'*RKneeThighGlobal;
     AnyMat33 RKneeShankMarkerFrame = BodyRef.Right.Leg.Seg.Shank.Axes'*RKneeShankGlobal;
     AnyMat33 RAnkleShankMarkerFrame = BodyRef.Right.Leg.Seg.Shank.Axes'*RAnkleShankGlobal;
     AnyMat33 RAnkleFootMarkerFrame = BodyRef.Right.Leg.Seg.Foot.Axes'*RAnkleFootGlobal;
     AnyMat33 LHipThighMarkerFrame = BodyRef.Left.Leg.Seg.Thigh.Axes'*LHipThighGlobal;
     AnyMat33 LKneeThighMarkerFrame = BodyRef.Left.Leg.Seg.Thigh.Axes'*LKneeThighGlobal;
     AnyMat33 LKneeShankMarkerFrame = BodyRef.Left.Leg.Seg.Shank.Axes'*LKneeShankGlobal;
     AnyMat33 LAnkleShankMarkerFrame = BodyRef.Left.Leg.Seg.Shank.Axes'*LAnkleShankGlobal;
     AnyMat33 LAnkleFootMarkerFrame = BodyRef.Left.Leg.Seg.Foot.Axes'*LAnkleFootGlobal;

     AnyFunEx SaveAnySetValue =  {
       AnyInt Return = 0;
       AnyFunExMonoPy save_anymat33= {
        ModuleFile = "save_anyset_file.py";
         ArgList =
         {
           AnyString filename = "Test file name";
           AnyString varname =  "Main.Studies.HumanModel.BodyModel.Right.Leg.Seg.Thigh.StaticMarkerFrame";
           AnyMat33 var = {{1.0,1.0,1.0},{2,2,2},{3,3,3}};
         };
       };
     };

     AnyString anysetfile = DesignVar("SC_ngait_og5");

     AnyInt ret0 = SaveAnySetValue(TEMP_FILE_PATH+"/"+anysetfile+"_StaticFrames.anyset",
        "Main.Studies.HumanModel.BodyModel.Trunk.SegmentsLumbar.PelvisSeg.StaticMarkerFrame.ARel",
                      PelvisMarkerFrame );
     AnyInt ret1 = SaveAnySetValue(TEMP_FILE_PATH+"/"+anysetfile+"_StaticFrames.anyset",
        "Main.Studies.HumanModel.BodyModel.Right.Leg.Seg.Thigh.HipStaticMarkerFrame.ARel",
                      RHipThighMarkerFrame );
     AnyInt ret2 = SaveAnySetValue(TEMP_FILE_PATH+"/"+anysetfile+"_StaticFrames.anyset",
        "Main.Studies.HumanModel.BodyModel.Right.Leg.Seg.Thigh.KneeStaticMarkerFrame.ARel",
                      RKneeThighMarkerFrame );


     AnyInt ret3 = SaveAnySetValue(TEMP_FILE_PATH+"/"+anysetfile+"_StaticFrames.anyset",
        "Main.Studies.HumanModel.BodyModel.Right.Leg.Seg.Shank.KneeStaticMarkerFrame.ARel",
                      RKneeShankMarkerFrame );
     AnyInt ret4 = SaveAnySetValue(TEMP_FILE_PATH+"/"+anysetfile+"_StaticFrames.anyset",
        "Main.Studies.HumanModel.BodyModel.Right.Leg.Seg.Shank.AnkleStaticMarkerFrame.ARel",
                      RAnkleShankMarkerFrame );
     AnyInt ret5 = SaveAnySetValue(TEMP_FILE_PATH+"/"+anysetfile+"_StaticFrames.anyset",
        "Main.Studies.HumanModel.BodyModel.Right.Leg.Seg.Foot.AnkleStaticMarkerFrame.ARel",
                      RAnkleFootMarkerFrame );

     AnyInt ret6 = SaveAnySetValue(TEMP_FILE_PATH+"/"+anysetfile+"_StaticFrames.anyset",
        "Main.Studies.HumanModel.BodyModel.Left.Leg.Seg.Thigh.HipStaticMarkerFrame.ARel",
                      LHipThighMarkerFrame );
     AnyInt ret7 = SaveAnySetValue(TEMP_FILE_PATH+"/"+anysetfile+"_StaticFrames.anyset",
        "Main.Studies.HumanModel.BodyModel.Left.Leg.Seg.Thigh.KneeStaticMarkerFrame.ARel",
                      LKneeThighMarkerFrame );


     AnyInt ret8 = SaveAnySetValue(TEMP_FILE_PATH+"/"+anysetfile+"_StaticFrames.anyset",
        "Main.Studies.HumanModel.BodyModel.Left.Leg.Seg.Shank.KneeStaticMarkerFrame.ARel",
                      LKneeShankMarkerFrame );
     AnyInt ret9 = SaveAnySetValue(TEMP_FILE_PATH+"/"+anysetfile+"_StaticFrames.anyset",
        "Main.Studies.HumanModel.BodyModel.Left.Leg.Seg.Shank.AnkleStaticMarkerFrame.ARel",
                      LAnkleShankMarkerFrame );
     AnyInt ret10 = SaveAnySetValue(TEMP_FILE_PATH+"/"+anysetfile+"_StaticFrames.anyset",
        "Main.Studies.HumanModel.BodyModel.Left.Leg.Seg.Foot.AnkleStaticMarkerFrame.ARel",
                      LAnkleFootMarkerFrame );

   };

  };
};


  AnyOperationMacro CalculateStaticCoordinateSystems = {
    MacroStr={
      "operation Main.CalculateStaticCoordinateSystems.SC_ngait_og5",
      "run",
      "operation Main.CalculateStaticCoordinateSystems.SC_ngait_og6",
      "run",
      "operation Main.CalculateStaticCoordinateSystems.SC_ngait_og7",
      "run",
      "operation Main.CalculateStaticCoordinateSystems.SC_ngait_og8",
      "run",
      "operation Main.CalculateStaticCoordinateSystems.SC_ngait_og9",
      "run",
      "operation Main.CalculateStaticCoordinateSystems.SC_bouncy_og3",
      "run",
      "operation Main.CalculateStaticCoordinateSystems.SC_bouncy_og5",
      "run",
      "operation Main.CalculateStaticCoordinateSystems.SC_bouncy_og6",
      "run",
      "operation Main.CalculateStaticCoordinateSystems.SC_bouncy_og7",
      "run",
      "operation Main.CalculateStaticCoordinateSystems.SC_bouncy_og8",
      "run",
      "operation Main.CalculateStaticCoordinateSystems.SC_crouch_og3",
      "run",
      "operation Main.CalculateStaticCoordinateSystems.SC_crouch_og4",
      "run",
      "operation Main.CalculateStaticCoordinateSystems.SC_crouch_og5",
      "run",
      "operation Main.CalculateStaticCoordinateSystems.SC_crouch_og6",
      "run",
      "operation Main.CalculateStaticCoordinateSystems.SC_medialthrust3",
      "run",
      "operation Main.CalculateStaticCoordinateSystems.SC_medialthrust4",
      "run",
      "operation Main.CalculateStaticCoordinateSystems.SC_medialthrust5",
      "run",
      "operation Main.CalculateStaticCoordinateSystems.SC_medialthrust6",
      "run",
      "operation Main.CalculateStaticCoordinateSystems.SC_medialthrust8",
      "run",
      "operation Main.CalculateStaticCoordinateSystems.SC_mtpgait1",
      "run",
      "operation Main.CalculateStaticCoordinateSystems.SC_mtpgait2",
      "run",
      "operation Main.CalculateStaticCoordinateSystems.SC_mtpgait3",
      "run",
      "operation Main.CalculateStaticCoordinateSystems.SC_mtpgait4",
      "run",
      "operation Main.CalculateStaticCoordinateSystems.SC_mtpgait5",
      "run",
      "operation Main.CalculateStaticCoordinateSystems.SC_mtpgait6",
      "run",
      "operation Main.CalculateStaticCoordinateSystems.SC_smooth_og1",
      "run",
      "operation Main.CalculateStaticCoordinateSystems.SC_smooth_og2",
      "run",
      "operation Main.CalculateStaticCoordinateSystems.SC_smooth_og3",
      "run",
      "operation Main.CalculateStaticCoordinateSystems.SC_smooth_og4",
      "run",
      "operation Main.CalculateStaticCoordinateSystems.SC_smooth_og5",
      "run",
      "operation Main.CalculateStaticCoordinateSystems.SC_trunksway1",
      "run",
      "operation Main.CalculateStaticCoordinateSystems.SC_trunksway4",
      "run",
      "operation Main.CalculateStaticCoordinateSystems.SC_trunksway5",
      "run",
      "operation Main.CalculateStaticCoordinateSystems.SC_trunksway6",
      "run",
      "operation Main.CalculateStaticCoordinateSystems.SC_trunksway7",
      "run",
      "operation Main.CalculateStaticCoordinateSystems.SC_wpgait_l11",
      "run",
      "operation Main.CalculateStaticCoordinateSystems.SC_wpgait_s1",
      "run",
      "operation Main.CalculateStaticCoordinateSystems.SC_wpgait_s5",
      "run",
      "operation Main.CalculateStaticCoordinateSystems.SC_wpgait_s6",
      "run"
    };
  AnyOperationMacro SC_ngait_og5 = {
    MacroStr={
      "classoperation Main.Studies.StaticStudy.StaticPos.anysetfile "
      +strquote("Set Value") + "--value="+strquote("SC_ngait_og5"),
      "classoperation Main.Studies.ParameterIdentification" + " " + strquote("Load design") +
      " --file=" + strquote(TEMP_FILE_PATH +"/"+"SC_ngait_og5"+"-OptimizedParameters.txt"),
      "operation Main.Studies.StaticStudy.InitialConditions",
      "run"
    };
  };
  AnyOperationMacro SC_ngait_og6 = {
    MacroStr={
      "classoperation Main.Studies.StaticStudy.StaticPos.anysetfile "
      +strquote("Set Value") + "--value="+strquote("SC_ngait_og6"),
      "classoperation Main.Studies.ParameterIdentification" + " " + strquote("Load design") +
      " --file=" + strquote(TEMP_FILE_PATH +"/"+"SC_ngait_og6"+"-OptimizedParameters.txt"),
      "operation Main.Studies.StaticStudy.InitialConditions",
      "run"
    };
  };
  AnyOperationMacro SC_ngait_og7 = {
    MacroStr={
      "classoperation Main.Studies.StaticStudy.StaticPos.anysetfile "
      +strquote("Set Value") + "--value="+strquote("SC_ngait_og7"),
      "classoperation Main.Studies.ParameterIdentification" + " " + strquote("Load design") +
      " --file=" + strquote(TEMP_FILE_PATH +"/"+"SC_ngait_og7"+"-OptimizedParameters.txt"),
      "operation Main.Studies.StaticStudy.InitialConditions",
      "run"
    };
  };
  AnyOperationMacro SC_ngait_og8 = {
    MacroStr={
      "classoperation Main.Studies.StaticStudy.StaticPos.anysetfile "
      +strquote("Set Value") + "--value="+strquote("SC_ngait_og8"),
      "classoperation Main.Studies.ParameterIdentification" + " " + strquote("Load design") +
      " --file=" + strquote(TEMP_FILE_PATH +"/"+"SC_ngait_og8"+"-OptimizedParameters.txt"),
      "operation Main.Studies.StaticStudy.InitialConditions",
      "run"
    };
  };
  AnyOperationMacro SC_ngait_og9 = {
    MacroStr={
      "classoperation Main.Studies.StaticStudy.StaticPos.anysetfile "
      +strquote("Set Value") + "--value="+strquote("SC_ngait_og9"),
      "classoperation Main.Studies.ParameterIdentification" + " " + strquote("Load design") +
      " --file=" + strquote(TEMP_FILE_PATH +"/"+"SC_ngait_og9"+"-OptimizedParameters.txt"),
      "operation Main.Studies.StaticStudy.InitialConditions",
      "run"
    };
  };
  AnyOperationMacro SC_bouncy_og3 = {
    MacroStr={
      "classoperation Main.Studies.StaticStudy.StaticPos.anysetfile "
      +strquote("Set Value") + "--value="+strquote("SC_bouncy_og3"),
      "classoperation Main.Studies.ParameterIdentification" + " " + strquote("Load design") +
      " --file=" + strquote(TEMP_FILE_PATH +"/"+"SC_bouncy_og3"+"-OptimizedParameters.txt"),
      "operation Main.Studies.StaticStudy.InitialConditions",
      "run"
    };
  };
  AnyOperationMacro SC_bouncy_og5 = {
    MacroStr={
      "classoperation Main.Studies.StaticStudy.StaticPos.anysetfile "
      +strquote("Set Value") + "--value="+strquote("SC_bouncy_og5"),
      "classoperation Main.Studies.ParameterIdentification" + " " + strquote("Load design") +
      " --file=" + strquote(TEMP_FILE_PATH +"/"+"SC_bouncy_og5"+"-OptimizedParameters.txt"),
      "operation Main.Studies.StaticStudy.InitialConditions",
      "run"
    };
  };
  AnyOperationMacro SC_bouncy_og6= {
    MacroStr={
      "classoperation Main.Studies.StaticStudy.StaticPos.anysetfile "
      +strquote("Set Value") + "--value="+strquote("SC_bouncy_og6"),
      "classoperation Main.Studies.ParameterIdentification" + " " + strquote("Load design") +
      " --file=" + strquote(TEMP_FILE_PATH +"/"+"SC_bouncy_og6"+"-OptimizedParameters.txt"),
      "operation Main.Studies.StaticStudy.InitialConditions",
      "run"
    };
  };
  AnyOperationMacro SC_bouncy_og7= {
    MacroStr={
      "classoperation Main.Studies.StaticStudy.StaticPos.anysetfile "
      +strquote("Set Value") + "--value="+strquote("SC_bouncy_og7"),
      "classoperation Main.Studies.ParameterIdentification" + " " + strquote("Load design") +
      " --file=" + strquote(TEMP_FILE_PATH +"/"+"SC_bouncy_og7"+"-OptimizedParameters.txt"),
      "operation Main.Studies.StaticStudy.InitialConditions",
      "run"
    };
  };
  AnyOperationMacro SC_bouncy_og8= {
    MacroStr={
      "classoperation Main.Studies.StaticStudy.StaticPos.anysetfile "
      +strquote("Set Value") + "--value="+strquote("SC_bouncy_og8"),
      "classoperation Main.Studies.ParameterIdentification" + " " + strquote("Load design") +
      " --file=" + strquote(TEMP_FILE_PATH +"/"+"SC_bouncy_og8"+"-OptimizedParameters.txt"),
      "operation Main.Studies.StaticStudy.InitialConditions",
      "run"
    };
  };
  AnyOperationMacro SC_crouch_og3= {
    MacroStr={
      "classoperation Main.Studies.StaticStudy.StaticPos.anysetfile "
      +strquote("Set Value") + "--value="+strquote("SC_crouch_og3"),
      "classoperation Main.Studies.ParameterIdentification" + " " + strquote("Load design") +
      " --file=" + strquote(TEMP_FILE_PATH +"/"+"SC_crouch_og3"+"-OptimizedParameters.txt"),
      "operation Main.Studies.StaticStudy.InitialConditions",
      "run"
    };
  };
  AnyOperationMacro SC_crouch_og4= {
    MacroStr={
      "classoperation Main.Studies.StaticStudy.StaticPos.anysetfile "
      +strquote("Set Value") + "--value="+strquote("SC_crouch_og4"),
      "classoperation Main.Studies.ParameterIdentification" + " " + strquote("Load design") +
      " --file=" + strquote(TEMP_FILE_PATH +"/"+"SC_crouch_og4"+"-OptimizedParameters.txt"),
      "operation Main.Studies.StaticStudy.InitialConditions",
      "run"
    };
  };
  AnyOperationMacro SC_crouch_og5= {
    MacroStr={
      "classoperation Main.Studies.StaticStudy.StaticPos.anysetfile "
      +strquote("Set Value") + "--value="+strquote("SC_crouch_og5"),
      "classoperation Main.Studies.ParameterIdentification" + " " + strquote("Load design") +
      " --file=" + strquote(TEMP_FILE_PATH +"/"+"SC_crouch_og5"+"-OptimizedParameters.txt"),
      "operation Main.Studies.StaticStudy.InitialConditions",
      "run"
    };
  };
  AnyOperationMacro SC_crouch_og6= {
    MacroStr={
      "classoperation Main.Studies.StaticStudy.StaticPos.anysetfile "
      +strquote("Set Value") + "--value="+strquote("SC_crouch_og6"),
      "classoperation Main.Studies.ParameterIdentification" + " " + strquote("Load design") +
      " --file=" + strquote(TEMP_FILE_PATH +"/"+"SC_crouch_og6"+"-OptimizedParameters.txt"),
      "operation Main.Studies.StaticStudy.InitialConditions",
      "run"
    };
  };
  AnyOperationMacro SC_medialthrust3= {
    MacroStr={
      "classoperation Main.Studies.StaticStudy.StaticPos.anysetfile "
      +strquote("Set Value") + "--value="+strquote("SC_medialthrust3"),
      "classoperation Main.Studies.ParameterIdentification" + " " + strquote("Load design") +
      " --file=" + strquote(TEMP_FILE_PATH +"/"+"SC_medialthrust3"+"-OptimizedParameters.txt"),
      "operation Main.Studies.StaticStudy.InitialConditions",
      "run"
    };
  };
  AnyOperationMacro SC_medialthrust4= {
    MacroStr={
      "classoperation Main.Studies.StaticStudy.StaticPos.anysetfile "
      +strquote("Set Value") + "--value="+strquote("SC_medialthrust4"),
      "classoperation Main.Studies.ParameterIdentification" + " " + strquote("Load design") +
      " --file=" + strquote(TEMP_FILE_PATH +"/"+"SC_medialthrust4"+"-OptimizedParameters.txt"),
      "operation Main.Studies.StaticStudy.InitialConditions",
      "run"
    };
  };
  AnyOperationMacro SC_medialthrust5= {
    MacroStr={
      "classoperation Main.Studies.StaticStudy.StaticPos.anysetfile "
      +strquote("Set Value") + "--value="+strquote("SC_medialthrust5"),
      "classoperation Main.Studies.ParameterIdentification" + " " + strquote("Load design") +
      " --file=" + strquote(TEMP_FILE_PATH +"/"+"SC_medialthrust5"+"-OptimizedParameters.txt"),
      "operation Main.Studies.StaticStudy.InitialConditions",
      "run"
    };
  };
  AnyOperationMacro SC_medialthrust6= {
    MacroStr={
      "classoperation Main.Studies.StaticStudy.StaticPos.anysetfile "
      +strquote("Set Value") + "--value="+strquote("SC_medialthrust6"),
      "classoperation Main.Studies.ParameterIdentification" + " " + strquote("Load design") +
      " --file=" + strquote(TEMP_FILE_PATH +"/"+"SC_medialthrust6"+"-OptimizedParameters.txt"),
      "operation Main.Studies.StaticStudy.InitialConditions",
      "run"
    };
  };
  AnyOperationMacro SC_medialthrust8= {
    MacroStr={
      "classoperation Main.Studies.StaticStudy.StaticPos.anysetfile "
      +strquote("Set Value") + "--value="+strquote("SC_medialthrust8"),
      "classoperation Main.Studies.ParameterIdentification" + " " + strquote("Load design") +
      " --file=" + strquote(TEMP_FILE_PATH +"/"+"SC_medialthrust8"+"-OptimizedParameters.txt"),
      "operation Main.Studies.StaticStudy.InitialConditions",
      "run"
    };
  };
  AnyOperationMacro SC_mtpgait1= {
    MacroStr={
      "classoperation Main.Studies.StaticStudy.StaticPos.anysetfile "
      +strquote("Set Value") + "--value="+strquote("SC_mtpgait1"),
      "classoperation Main.Studies.ParameterIdentification" + " " + strquote("Load design") +
      " --file=" + strquote(TEMP_FILE_PATH +"/"+"SC_mtpgait1"+"-OptimizedParameters.txt"),
      "operation Main.Studies.StaticStudy.InitialConditions",
      "run"
    };
  };
  AnyOperationMacro SC_mtpgait2= {
    MacroStr={
      "classoperation Main.Studies.StaticStudy.StaticPos.anysetfile "
      +strquote("Set Value") + "--value="+strquote("SC_mtpgait2"),
      "classoperation Main.Studies.ParameterIdentification" + " " + strquote("Load design") +
      " --file=" + strquote(TEMP_FILE_PATH +"/"+"SC_mtpgait2"+"-OptimizedParameters.txt"),
      "operation Main.Studies.StaticStudy.InitialConditions",
      "run"
    };
  };
  AnyOperationMacro SC_mtpgait3= {
    MacroStr={
      "classoperation Main.Studies.StaticStudy.StaticPos.anysetfile "
      +strquote("Set Value") + "--value="+strquote("SC_mtpgait3"),
      "classoperation Main.Studies.ParameterIdentification" + " " + strquote("Load design") +
      " --file=" + strquote(TEMP_FILE_PATH +"/"+"SC_mtpgait3"+"-OptimizedParameters.txt"),
      "operation Main.Studies.StaticStudy.InitialConditions",
      "run"
    };
  };
  AnyOperationMacro SC_mtpgait4= {
    MacroStr={
      "classoperation Main.Studies.StaticStudy.StaticPos.anysetfile "
      +strquote("Set Value") + "--value="+strquote("SC_mtpgait4"),
      "classoperation Main.Studies.ParameterIdentification" + " " + strquote("Load design") +
      " --file=" + strquote(TEMP_FILE_PATH +"/"+"SC_mtpgait4"+"-OptimizedParameters.txt"),
      "operation Main.Studies.StaticStudy.InitialConditions",
      "run"
    };
  };
  AnyOperationMacro SC_mtpgait5= {
    MacroStr={
      "classoperation Main.Studies.StaticStudy.StaticPos.anysetfile "
      +strquote("Set Value") + "--value="+strquote("SC_mtpgait5"),
      "classoperation Main.Studies.ParameterIdentification" + " " + strquote("Load design") +
      " --file=" + strquote(TEMP_FILE_PATH +"/"+"SC_mtpgait5"+"-OptimizedParameters.txt"),
      "operation Main.Studies.StaticStudy.InitialConditions",
      "run"
    };
  };
  AnyOperationMacro SC_mtpgait6= {
    MacroStr={
      "classoperation Main.Studies.StaticStudy.StaticPos.anysetfile "
      +strquote("Set Value") + "--value="+strquote("SC_mtpgait6"),
      "classoperation Main.Studies.ParameterIdentification" + " " + strquote("Load design") +
      " --file=" + strquote(TEMP_FILE_PATH +"/"+"SC_mtpgait6"+"-OptimizedParameters.txt"),
      "operation Main.Studies.StaticStudy.InitialConditions",
      "run"
    };
  };
  AnyOperationMacro SC_smooth_og1= {
    MacroStr={
      "classoperation Main.Studies.StaticStudy.StaticPos.anysetfile "
      +strquote("Set Value") + "--value="+strquote("SC_smooth_og1"),
      "classoperation Main.Studies.ParameterIdentification" + " " + strquote("Load design") +
      " --file=" + strquote(TEMP_FILE_PATH +"/"+"SC_smooth_og1"+"-OptimizedParameters.txt"),
      "operation Main.Studies.StaticStudy.InitialConditions",
      "run"
    };
  };
  AnyOperationMacro SC_smooth_og2= {
    MacroStr={
      "classoperation Main.Studies.StaticStudy.StaticPos.anysetfile "
      +strquote("Set Value") + "--value="+strquote("SC_smooth_og2"),
      "classoperation Main.Studies.ParameterIdentification" + " " + strquote("Load design") +
      " --file=" + strquote(TEMP_FILE_PATH +"/"+"SC_smooth_og2"+"-OptimizedParameters.txt"),
      "operation Main.Studies.StaticStudy.InitialConditions",
      "run"
    };
  };
  AnyOperationMacro SC_smooth_og3= {
    MacroStr={
      "classoperation Main.Studies.StaticStudy.StaticPos.anysetfile "
      +strquote("Set Value") + "--value="+strquote("SC_smooth_og3"),
      "classoperation Main.Studies.ParameterIdentification" + " " + strquote("Load design") +
      " --file=" + strquote(TEMP_FILE_PATH +"/"+"SC_smooth_og3"+"-OptimizedParameters.txt"),
      "operation Main.Studies.StaticStudy.InitialConditions",
      "run"
    };
  };
  AnyOperationMacro SC_smooth_og4= {
    MacroStr={
      "classoperation Main.Studies.StaticStudy.StaticPos.anysetfile "
      +strquote("Set Value") + "--value="+strquote("SC_smooth_og4"),
      "classoperation Main.Studies.ParameterIdentification" + " " + strquote("Load design") +
      " --file=" + strquote(TEMP_FILE_PATH +"/"+"SC_smooth_og4"+"-OptimizedParameters.txt"),
      "operation Main.Studies.StaticStudy.InitialConditions",
      "run"
    };
  };
  AnyOperationMacro SC_smooth_og5= {
    MacroStr={
      "classoperation Main.Studies.StaticStudy.StaticPos.anysetfile "
      +strquote("Set Value") + "--value="+strquote("SC_smooth_og5"),
      "classoperation Main.Studies.ParameterIdentification" + " " + strquote("Load design") +
      " --file=" + strquote(TEMP_FILE_PATH +"/"+"SC_smooth_og5"+"-OptimizedParameters.txt"),
      "operation Main.Studies.StaticStudy.InitialConditions",
      "run"
    };
  };
  AnyOperationMacro SC_trunksway1= {
    MacroStr={
      "classoperation Main.Studies.StaticStudy.StaticPos.anysetfile "
      +strquote("Set Value") + "--value="+strquote("SC_trunksway1"),
      "classoperation Main.Studies.ParameterIdentification" + " " + strquote("Load design") +
      " --file=" + strquote(TEMP_FILE_PATH +"/"+"SC_trunksway1"+"-OptimizedParameters.txt"),
      "operation Main.Studies.StaticStudy.InitialConditions",
      "run"
    };
  };
  AnyOperationMacro SC_trunksway4= {
    MacroStr={
      "classoperation Main.Studies.StaticStudy.StaticPos.anysetfile "
      +strquote("Set Value") + "--value="+strquote("SC_trunksway4"),
      "classoperation Main.Studies.ParameterIdentification" + " " + strquote("Load design") +
      " --file=" + strquote(TEMP_FILE_PATH +"/"+"SC_trunksway4"+"-OptimizedParameters.txt"),
      "operation Main.Studies.StaticStudy.InitialConditions",
      "run"
    };
  };
  AnyOperationMacro SC_trunksway5= {
    MacroStr={
      "classoperation Main.Studies.StaticStudy.StaticPos.anysetfile "
      +strquote("Set Value") + "--value="+strquote("SC_trunksway5"),
      "classoperation Main.Studies.ParameterIdentification" + " " + strquote("Load design") +
      " --file=" + strquote(TEMP_FILE_PATH +"/"+"SC_trunksway5"+"-OptimizedParameters.txt"),
      "operation Main.Studies.StaticStudy.InitialConditions",
      "run"
    };
  };
  AnyOperationMacro SC_trunksway6= {
    MacroStr={
      "classoperation Main.Studies.StaticStudy.StaticPos.anysetfile "
      +strquote("Set Value") + "--value="+strquote("SC_trunksway6"),
      "classoperation Main.Studies.ParameterIdentification" + " " + strquote("Load design") +
      " --file=" + strquote(TEMP_FILE_PATH +"/"+"SC_trunksway6"+"-OptimizedParameters.txt"),
      "operation Main.Studies.StaticStudy.InitialConditions",
      "run"
    };
  };
  AnyOperationMacro SC_trunksway7= {
    MacroStr={
      "classoperation Main.Studies.StaticStudy.StaticPos.anysetfile "
      +strquote("Set Value") + "--value="+strquote("SC_trunksway7"),
      "classoperation Main.Studies.ParameterIdentification" + " " + strquote("Load design") +
      " --file=" + strquote(TEMP_FILE_PATH +"/"+"SC_trunksway7"+"-OptimizedParameters.txt"),
      "operation Main.Studies.StaticStudy.InitialConditions",
      "run"
    };
  };
  AnyOperationMacro SC_wpgait_l11= {
    MacroStr={
      "classoperation Main.Studies.StaticStudy.StaticPos.anysetfile "
      +strquote("Set Value") + "--value="+strquote("SC_wpgait_l11"),
      "classoperation Main.Studies.ParameterIdentification" + " " + strquote("Load design") +
      " --file=" + strquote(TEMP_FILE_PATH +"/"+"SC_wpgait_l11"+"-OptimizedParameters.txt"),
      "operation Main.Studies.StaticStudy.InitialConditions",
      "run"
    };
  };
  AnyOperationMacro SC_wpgait_s1= {
    MacroStr={
      "classoperation Main.Studies.StaticStudy.StaticPos.anysetfile "
      +strquote("Set Value") + "--value="+strquote("SC_wpgait_s1"),
      "classoperation Main.Studies.ParameterIdentification" + " " + strquote("Load design") +
      " --file=" + strquote(TEMP_FILE_PATH +"/"+"SC_wpgait_s1"+"-OptimizedParameters.txt"),
      "operation Main.Studies.StaticStudy.InitialConditions",
      "run"
    };
  };
  AnyOperationMacro SC_wpgait_s5= {
    MacroStr={
      "classoperation Main.Studies.StaticStudy.StaticPos.anysetfile "
      +strquote("Set Value") + "--value="+strquote("SC_wpgait_s5"),
      "classoperation Main.Studies.ParameterIdentification" + " " + strquote("Load design") +
      " --file=" + strquote(TEMP_FILE_PATH +"/"+"SC_wpgait_s5"+"-OptimizedParameters.txt"),
      "operation Main.Studies.StaticStudy.InitialConditions",
      "run"
    };
  };
  AnyOperationMacro SC_wpgait_s6= {
    MacroStr={
      "classoperation Main.Studies.StaticStudy.StaticPos.anysetfile "
      +strquote("Set Value") + "--value="+strquote("SC_wpgait_s6"),
      "classoperation Main.Studies.ParameterIdentification" + " " + strquote("Load design") +
      " --file=" + strquote(TEMP_FILE_PATH +"/"+"SC_wpgait_s6"+"-OptimizedParameters.txt"),
      "operation Main.Studies.StaticStudy.InitialConditions",
      "run"
    };
  };


  };

    AnyOperationMacro CalculateStaticCoordinateSystemsALL= {
    MacroStr={
      "classoperation Main.Studies.StaticStudy.StaticPos.anysetfile "
      +strquote("Set Value") + "--value="+strquote("SC_ngait_og5"),
      "classoperation Main.Studies.ParameterIdentification" + " " + strquote("Load design") +
      " --file=" + strquote(TEMP_FILE_PATH +"/"+"SC_ngait_og5"+"-OptimizedParameters.txt"),
      "operation Main.Studies.StaticStudy.InitialConditions",
      "run",
      "classoperation Main.Studies.StaticStudy.StaticPos.anysetfile "
      +strquote("Set Value") + "--value="+strquote("SC_ngait_og6"),
      "classoperation Main.Studies.ParameterIdentification" + " " + strquote("Load design") +
      " --file=" + strquote(TEMP_FILE_PATH +"/"+"SC_ngait_og6"+"-OptimizedParameters.txt"),
      "operation Main.Studies.StaticStudy.InitialConditions",
      "run",
      "classoperation Main.Studies.StaticStudy.StaticPos.anysetfile "
      +strquote("Set Value") + "--value="+strquote("SC_ngait_og7"),
      "classoperation Main.Studies.ParameterIdentification" + " " + strquote("Load design") +
      " --file=" + strquote(TEMP_FILE_PATH +"/"+"SC_ngait_og7"+"-OptimizedParameters.txt"),
      "operation Main.Studies.StaticStudy.InitialConditions",
      "run",
      "classoperation Main.Studies.StaticStudy.StaticPos.anysetfile "
      +strquote("Set Value") + "--value="+strquote("SC_ngait_og8"),
      "classoperation Main.Studies.ParameterIdentification" + " " + strquote("Load design") +
      " --file=" + strquote(TEMP_FILE_PATH +"/"+"SC_ngait_og8"+"-OptimizedParameters.txt"),
      "operation Main.Studies.StaticStudy.InitialConditions",
      "run",
      "classoperation Main.Studies.StaticStudy.StaticPos.anysetfile "
      +strquote("Set Value") + "--value="+strquote("SC_ngait_og9"),
      "classoperation Main.Studies.ParameterIdentification" + " " + strquote("Load design") +
      " --file=" + strquote(TEMP_FILE_PATH +"/"+"SC_ngait_og9"+"-OptimizedParameters.txt"),
      "operation Main.Studies.StaticStudy.InitialConditions",
      "run",
      "classoperation Main.Studies.StaticStudy.StaticPos.anysetfile "
      +strquote("Set Value") + "--value="+strquote("SC_bouncy_og3"),
      "classoperation Main.Studies.ParameterIdentification" + " " + strquote("Load design") +
      " --file=" + strquote(TEMP_FILE_PATH +"/"+"SC_bouncy_og3"+"-OptimizedParameters.txt"),
      "operation Main.Studies.StaticStudy.InitialConditions",
      "run",
      "classoperation Main.Studies.StaticStudy.StaticPos.anysetfile "
      +strquote("Set Value") + "--value="+strquote("SC_bouncy_og5"),
      "classoperation Main.Studies.ParameterIdentification" + " " + strquote("Load design") +
      " --file=" + strquote(TEMP_FILE_PATH +"/"+"SC_bouncy_og5"+"-OptimizedParameters.txt"),
      "operation Main.Studies.StaticStudy.InitialConditions",
      "run",
      "classoperation Main.Studies.StaticStudy.StaticPos.anysetfile "
      +strquote("Set Value") + "--value="+strquote("SC_bouncy_og6"),
      "classoperation Main.Studies.ParameterIdentification" + " " + strquote("Load design") +
      " --file=" + strquote(TEMP_FILE_PATH +"/"+"SC_bouncy_og6"+"-OptimizedParameters.txt"),
      "operation Main.Studies.StaticStudy.InitialConditions",
      "run",
      "classoperation Main.Studies.StaticStudy.StaticPos.anysetfile "
      +strquote("Set Value") + "--value="+strquote("SC_bouncy_og7"),
      "classoperation Main.Studies.ParameterIdentification" + " " + strquote("Load design") +
      " --file=" + strquote(TEMP_FILE_PATH +"/"+"SC_bouncy_og7"+"-OptimizedParameters.txt"),
      "operation Main.Studies.StaticStudy.InitialConditions",
      "run",
      "classoperation Main.Studies.StaticStudy.StaticPos.anysetfile "
      +strquote("Set Value") + "--value="+strquote("SC_bouncy_og8"),
      "classoperation Main.Studies.ParameterIdentification" + " " + strquote("Load design") +
      " --file=" + strquote(TEMP_FILE_PATH +"/"+"SC_bouncy_og8"+"-OptimizedParameters.txt"),
      "operation Main.Studies.StaticStudy.InitialConditions",
      "run",
      "classoperation Main.Studies.StaticStudy.StaticPos.anysetfile "
      +strquote("Set Value") + "--value="+strquote("SC_crouch_og3"),
      "classoperation Main.Studies.ParameterIdentification" + " " + strquote("Load design") +
      " --file=" + strquote(TEMP_FILE_PATH +"/"+"SC_crouch_og3"+"-OptimizedParameters.txt"),
      "operation Main.Studies.StaticStudy.InitialConditions",
      "run",
      "classoperation Main.Studies.StaticStudy.StaticPos.anysetfile "
      +strquote("Set Value") + "--value="+strquote("SC_crouch_og4"),
      "classoperation Main.Studies.ParameterIdentification" + " " + strquote("Load design") +
      " --file=" + strquote(TEMP_FILE_PATH +"/"+"SC_crouch_og4"+"-OptimizedParameters.txt"),
      "operation Main.Studies.StaticStudy.InitialConditions",
      "run",
      "classoperation Main.Studies.StaticStudy.StaticPos.anysetfile "
      +strquote("Set Value") + "--value="+strquote("SC_crouch_og5"),
      "classoperation Main.Studies.ParameterIdentification" + " " + strquote("Load design") +
      " --file=" + strquote(TEMP_FILE_PATH +"/"+"SC_crouch_og5"+"-OptimizedParameters.txt"),
      "operation Main.Studies.StaticStudy.InitialConditions",
      "run",
      "classoperation Main.Studies.StaticStudy.StaticPos.anysetfile "
      +strquote("Set Value") + "--value="+strquote("SC_crouch_og6"),
      "classoperation Main.Studies.ParameterIdentification" + " " + strquote("Load design") +
      " --file=" + strquote(TEMP_FILE_PATH +"/"+"SC_crouch_og6"+"-OptimizedParameters.txt"),
      "operation Main.Studies.StaticStudy.InitialConditions",
      "run",
      "classoperation Main.Studies.StaticStudy.StaticPos.anysetfile "
      +strquote("Set Value") + "--value="+strquote("SC_medialthrust3"),
      "classoperation Main.Studies.ParameterIdentification" + " " + strquote("Load design") +
      " --file=" + strquote(TEMP_FILE_PATH +"/"+"SC_medialthrust3"+"-OptimizedParameters.txt"),
      "operation Main.Studies.StaticStudy.InitialConditions",
      "run",
      "classoperation Main.Studies.StaticStudy.StaticPos.anysetfile "
      +strquote("Set Value") + "--value="+strquote("SC_medialthrust4"),
      "classoperation Main.Studies.ParameterIdentification" + " " + strquote("Load design") +
      " --file=" + strquote(TEMP_FILE_PATH +"/"+"SC_medialthrust4"+"-OptimizedParameters.txt"),
      "operation Main.Studies.StaticStudy.InitialConditions",
      "run",
      "classoperation Main.Studies.StaticStudy.StaticPos.anysetfile "
      +strquote("Set Value") + "--value="+strquote("SC_medialthrust5"),
      "classoperation Main.Studies.ParameterIdentification" + " " + strquote("Load design") +
      " --file=" + strquote(TEMP_FILE_PATH +"/"+"SC_medialthrust5"+"-OptimizedParameters.txt"),
      "operation Main.Studies.StaticStudy.InitialConditions",
      "run",
      "classoperation Main.Studies.StaticStudy.StaticPos.anysetfile "
      +strquote("Set Value") + "--value="+strquote("SC_medialthrust6"),
      "classoperation Main.Studies.ParameterIdentification" + " " + strquote("Load design") +
      " --file=" + strquote(TEMP_FILE_PATH +"/"+"SC_medialthrust6"+"-OptimizedParameters.txt"),
      "operation Main.Studies.StaticStudy.InitialConditions",
      "run",
      "classoperation Main.Studies.StaticStudy.StaticPos.anysetfile "
      +strquote("Set Value") + "--value="+strquote("SC_medialthrust8"),
      "classoperation Main.Studies.ParameterIdentification" + " " + strquote("Load design") +
      " --file=" + strquote(TEMP_FILE_PATH +"/"+"SC_medialthrust8"+"-OptimizedParameters.txt"),
      "operation Main.Studies.StaticStudy.InitialConditions",
      "run",
      "classoperation Main.Studies.StaticStudy.StaticPos.anysetfile "
      +strquote("Set Value") + "--value="+strquote("SC_mtpgait1"),
      "classoperation Main.Studies.ParameterIdentification" + " " + strquote("Load design") +
      " --file=" + strquote(TEMP_FILE_PATH +"/"+"SC_mtpgait1"+"-OptimizedParameters.txt"),
      "operation Main.Studies.StaticStudy.InitialConditions",
      "run",
      "classoperation Main.Studies.StaticStudy.StaticPos.anysetfile "
      +strquote("Set Value") + "--value="+strquote("SC_mtpgait2"),
      "classoperation Main.Studies.ParameterIdentification" + " " + strquote("Load design") +
      " --file=" + strquote(TEMP_FILE_PATH +"/"+"SC_mtpgait2"+"-OptimizedParameters.txt"),
      "operation Main.Studies.StaticStudy.InitialConditions",
      "run",
      "classoperation Main.Studies.StaticStudy.StaticPos.anysetfile "
      +strquote("Set Value") + "--value="+strquote("SC_mtpgait3"),
      "classoperation Main.Studies.ParameterIdentification" + " " + strquote("Load design") +
      " --file=" + strquote(TEMP_FILE_PATH +"/"+"SC_mtpgait3"+"-OptimizedParameters.txt"),
      "operation Main.Studies.StaticStudy.InitialConditions",
      "run",
      "classoperation Main.Studies.StaticStudy.StaticPos.anysetfile "
      +strquote("Set Value") + "--value="+strquote("SC_mtpgait4"),
      "classoperation Main.Studies.ParameterIdentification" + " " + strquote("Load design") +
      " --file=" + strquote(TEMP_FILE_PATH +"/"+"SC_mtpgait4"+"-OptimizedParameters.txt"),
      "operation Main.Studies.StaticStudy.InitialConditions",
      "run",
      "classoperation Main.Studies.StaticStudy.StaticPos.anysetfile "
      +strquote("Set Value") + "--value="+strquote("SC_mtpgait5"),
      "classoperation Main.Studies.ParameterIdentification" + " " + strquote("Load design") +
      " --file=" + strquote(TEMP_FILE_PATH +"/"+"SC_mtpgait5"+"-OptimizedParameters.txt"),
      "operation Main.Studies.StaticStudy.InitialConditions",
      "run",
      "classoperation Main.Studies.StaticStudy.StaticPos.anysetfile "
      +strquote("Set Value") + "--value="+strquote("SC_mtpgait6"),
      "classoperation Main.Studies.ParameterIdentification" + " " + strquote("Load design") +
      " --file=" + strquote(TEMP_FILE_PATH +"/"+"SC_mtpgait6"+"-OptimizedParameters.txt"),
      "operation Main.Studies.StaticStudy.InitialConditions",
      "run",
      "classoperation Main.Studies.StaticStudy.StaticPos.anysetfile "
      +strquote("Set Value") + "--value="+strquote("SC_smooth_og1"),
      "classoperation Main.Studies.ParameterIdentification" + " " + strquote("Load design") +
      " --file=" + strquote(TEMP_FILE_PATH +"/"+"SC_smooth_og1"+"-OptimizedParameters.txt"),
      "operation Main.Studies.StaticStudy.InitialConditions",
      "run",
      "classoperation Main.Studies.StaticStudy.StaticPos.anysetfile "
      +strquote("Set Value") + "--value="+strquote("SC_smooth_og2"),
      "classoperation Main.Studies.ParameterIdentification" + " " + strquote("Load design") +
      " --file=" + strquote(TEMP_FILE_PATH +"/"+"SC_smooth_og2"+"-OptimizedParameters.txt"),
      "operation Main.Studies.StaticStudy.InitialConditions",
      "run",
      "classoperation Main.Studies.StaticStudy.StaticPos.anysetfile "
      +strquote("Set Value") + "--value="+strquote("SC_smooth_og3"),
      "classoperation Main.Studies.ParameterIdentification" + " " + strquote("Load design") +
      " --file=" + strquote(TEMP_FILE_PATH +"/"+"SC_smooth_og3"+"-OptimizedParameters.txt"),
      "operation Main.Studies.StaticStudy.InitialConditions",
      "run",
      "classoperation Main.Studies.StaticStudy.StaticPos.anysetfile "
      +strquote("Set Value") + "--value="+strquote("SC_smooth_og4"),
      "classoperation Main.Studies.ParameterIdentification" + " " + strquote("Load design") +
      " --file=" + strquote(TEMP_FILE_PATH +"/"+"SC_smooth_og4"+"-OptimizedParameters.txt"),
      "operation Main.Studies.StaticStudy.InitialConditions",
      "run",
      "classoperation Main.Studies.StaticStudy.StaticPos.anysetfile "
      +strquote("Set Value") + "--value="+strquote("SC_smooth_og5"),
      "classoperation Main.Studies.ParameterIdentification" + " " + strquote("Load design") +
      " --file=" + strquote(TEMP_FILE_PATH +"/"+"SC_smooth_og5"+"-OptimizedParameters.txt"),
      "operation Main.Studies.StaticStudy.InitialConditions",
      "run",
      "classoperation Main.Studies.StaticStudy.StaticPos.anysetfile "
      +strquote("Set Value") + "--value="+strquote("SC_trunksway1"),
      "classoperation Main.Studies.ParameterIdentification" + " " + strquote("Load design") +
      " --file=" + strquote(TEMP_FILE_PATH +"/"+"SC_trunksway1"+"-OptimizedParameters.txt"),
      "operation Main.Studies.StaticStudy.InitialConditions",
      "run",
      "classoperation Main.Studies.StaticStudy.StaticPos.anysetfile "
      +strquote("Set Value") + "--value="+strquote("SC_trunksway4"),
      "classoperation Main.Studies.ParameterIdentification" + " " + strquote("Load design") +
      " --file=" + strquote(TEMP_FILE_PATH +"/"+"SC_trunksway4"+"-OptimizedParameters.txt"),
      "operation Main.Studies.StaticStudy.InitialConditions",
      "run",
      "classoperation Main.Studies.StaticStudy.StaticPos.anysetfile "
      +strquote("Set Value") + "--value="+strquote("SC_trunksway5"),
      "classoperation Main.Studies.ParameterIdentification" + " " + strquote("Load design") +
      " --file=" + strquote(TEMP_FILE_PATH +"/"+"SC_trunksway5"+"-OptimizedParameters.txt"),
      "operation Main.Studies.StaticStudy.InitialConditions",
      "run",
      "classoperation Main.Studies.StaticStudy.StaticPos.anysetfile "
      +strquote("Set Value") + "--value="+strquote("SC_trunksway6"),
      "classoperation Main.Studies.ParameterIdentification" + " " + strquote("Load design") +
      " --file=" + strquote(TEMP_FILE_PATH +"/"+"SC_trunksway6"+"-OptimizedParameters.txt"),
      "operation Main.Studies.StaticStudy.InitialConditions",
      "run",
      "classoperation Main.Studies.StaticStudy.StaticPos.anysetfile "
      +strquote("Set Value") + "--value="+strquote("SC_trunksway7"),
      "classoperation Main.Studies.ParameterIdentification" + " " + strquote("Load design") +
      " --file=" + strquote(TEMP_FILE_PATH +"/"+"SC_trunksway7"+"-OptimizedParameters.txt"),
      "operation Main.Studies.StaticStudy.InitialConditions",
      "run",
      "classoperation Main.Studies.StaticStudy.StaticPos.anysetfile "
      +strquote("Set Value") + "--value="+strquote("SC_wpgait_l11"),
      "classoperation Main.Studies.ParameterIdentification" + " " + strquote("Load design") +
      " --file=" + strquote(TEMP_FILE_PATH +"/"+"SC_wpgait_l11"+"-OptimizedParameters.txt"),
      "operation Main.Studies.StaticStudy.InitialConditions",
      "run",
      "classoperation Main.Studies.StaticStudy.StaticPos.anysetfile "
      +strquote("Set Value") + "--value="+strquote("SC_wpgait_s1"),
      "classoperation Main.Studies.ParameterIdentification" + " " + strquote("Load design") +
      " --file=" + strquote(TEMP_FILE_PATH +"/"+"SC_wpgait_s1"+"-OptimizedParameters.txt"),
      "operation Main.Studies.StaticStudy.InitialConditions",
      "run",
      "classoperation Main.Studies.StaticStudy.StaticPos.anysetfile "
      +strquote("Set Value") + "--value="+strquote("SC_wpgait_s5"),
      "classoperation Main.Studies.ParameterIdentification" + " " + strquote("Load design") +
      " --file=" + strquote(TEMP_FILE_PATH +"/"+"SC_wpgait_s5"+"-OptimizedParameters.txt"),
      "operation Main.Studies.StaticStudy.InitialConditions",
      "run",
      "classoperation Main.Studies.StaticStudy.StaticPos.anysetfile "
      +strquote("Set Value") + "--value="+strquote("SC_wpgait_s6"),
      "classoperation Main.Studies.ParameterIdentification" + " " + strquote("Load design") +
      " --file=" + strquote(TEMP_FILE_PATH +"/"+"SC_wpgait_s6"+"-OptimizedParameters.txt"),
      "operation Main.Studies.StaticStudy.InitialConditions",
      "run"
    };
  };
