AnyFolder Model = {
  // Model parts included in the moment arm study
  AnyFolder &PelvisRef = .....HumanFolderRef.Trunk.SegmentsLumbar.PelvisSeg; //This is a reference to the folder which holds the human part of the model
  AnyFolder &LegSegSideRef = .SideHumanFolderRef.Leg.Seg; //This is a reference to the folder which holds the human part of the model
  AnyFolder &LegJntsRef =  .SideHumanFolderRef.Leg.Jnt;
  AnyFolder &LegMusRef = .SideHumanFolderRef.Leg.Mus;
  AnyFolder &SpineMusRef = .SideTrunkMusRef;

  AnyFixedRefFrame ground = {
    AnyRefNode node = {
      ARel=..PelvisRef.Axes0;
      sRel=..PelvisRef.r0;
    };
  };

  AnyFolder Drivers = {
    AnyVar AngularVelocity = (..RangeOfMotion[1]-..RangeOfMotion[0])*pi/180;
    AnyKinMeasureOrg LegMeasure = {
      AnyKinMeasure &HipFlexion= ...SideHumanInterfaceRef.ISB_JointMeasures.HipFlexion;
      AnyKinMeasure &HipAbduction= ...SideHumanInterfaceRef.ISB_JointMeasures.HipAbduction;
      AnyKinMeasure &HipExternalRotation= ...SideHumanInterfaceRef.ISB_JointMeasures.HipExternalRotation;
      AnyKinMeasure &KneeFlexion= ...SideHumanInterfaceRef.KneeFlexion;
      AnyKinMeasure &AnklePlantarFlexion= ...SideHumanInterfaceRef.AnklePlantarFlexion;
      AnyKinMeasure &AnkleEversion= ...SideHumanInterfaceRef.AnkleEversion;
    };
    AnyStdJoint PelvisGround={
      AnyRefFrame &Ground = ..ground.node;
      AnyRefFrame &Sacrum= ..PelvisRef;
    };
  };// Drivers
};// Model


AnyKinStudy Study = {
  Gravity = {0,0,0};
  nStep = 40;
  InitialConditions.SolverType = KinSolOverDeterminate;
  AnyFolder &Model = .Model;

  AnyFolder MomentArmCalculations = {
    AnyFolder Abcissa = {
      AnyVar JointAngle =  not(not(..Model.Drivers.LegDriver.DriverVel))*..Model.Drivers.LegMeasure.Pos'*180/pi  ;
    };

    AnyVar PsoasMajorT12I = -1*.Model.SpineMusRef.PsoasMajor.PMT12I_TM.LmtDot/.Model.Drivers.AngularVelocity;
    AnyVar PsoasMajorL1I = -1*.Model.SpineMusRef.PsoasMajor.PML1I_TM.LmtDot/.Model.Drivers.AngularVelocity;
    AnyVar PsoasMajorL1T = -1*.Model.SpineMusRef.PsoasMajor.PML1T_TM.LmtDot/.Model.Drivers.AngularVelocity;
    AnyVar PsoasMajorL2I = -1*.Model.SpineMusRef.PsoasMajor.PML2I_TM.LmtDot/.Model.Drivers.AngularVelocity;
    AnyVar PsoasMajorL2T = -1*.Model.SpineMusRef.PsoasMajor.PML2T_TM.LmtDot/.Model.Drivers.AngularVelocity;
    AnyVar PsoasMajorL3I = -1*.Model.SpineMusRef.PsoasMajor.PML3I_TM.LmtDot/.Model.Drivers.AngularVelocity;
    AnyVar PsoasMajorL3T = -1*.Model.SpineMusRef.PsoasMajor.PML3T_TM.LmtDot/.Model.Drivers.AngularVelocity;
    AnyVar PsoasMajorL4I = -1*.Model.SpineMusRef.PsoasMajor.PML4I_TM.LmtDot/.Model.Drivers.AngularVelocity;
    AnyVar PsoasMajorL4T = -1*.Model.SpineMusRef.PsoasMajor.PML4T_TM.LmtDot/.Model.Drivers.AngularVelocity;
    AnyVar PsoasMajorL5 = -1*.Model.SpineMusRef.PsoasMajor.PML5_TM.LmtDot/.Model.Drivers.AngularVelocity;
    AnyVar PsoasMajorL5T = -1*.Model.SpineMusRef.PsoasMajor.PML5T_TM.LmtDot/.Model.Drivers.AngularVelocity;
    //

      AnyVar Soleus = -1*(.Model.LegMusRef.Soleus.LmtDot/.Model.Drivers.AngularVelocity);
      AnyVar Gastrocnemius = -1*(.Model.LegMusRef.Gastrocnemius.LmtDot/.Model.Drivers.AngularVelocity);
      AnyVar FlexorDigitorumLongus = -1*(.Model.LegMusRef.FlexorDigitorumLongus.LmtDot/.Model.Drivers.AngularVelocity);
      AnyVar FlexorHallucisLongus = -1*(.Model.LegMusRef.FlexorHallucisLongus.LmtDot/.Model.Drivers.AngularVelocity);
      AnyVar TibialisPosterior = -1*(.Model.LegMusRef.TibialisPosterior.LmtDot/.Model.Drivers.AngularVelocity);
      AnyVar PeroneusBrevis    = -1*(.Model.LegMusRef.PeroneusBrevis.LmtDot/.Model.Drivers.AngularVelocity);
      AnyVar ExtensorDigitorumLongus = -1*(.Model.LegMusRef.ExtensorDigitorumLongus.LmtDot/.Model.Drivers.AngularVelocity);
      AnyVar ExtensorHallucisLongus = -1*(.Model.LegMusRef.ExtensorHallucisLongus.LmtDot/.Model.Drivers.AngularVelocity);
      AnyVar VastusLateralis = -1*(.Model.LegMusRef.VastusLateralis.LmtDot/.Model.Drivers.AngularVelocity);
      AnyVar VastusMedialis = -1*(.Model.LegMusRef.VastusMedialis.LmtDot/.Model.Drivers.AngularVelocity);
      AnyVar VastusIntermedius = -1*(.Model.LegMusRef.VastusIntermedius.LmtDot/.Model.Drivers.AngularVelocity);
      AnyVar RectusFemoris = -1*(.Model.LegMusRef.RectusFemoris.LmtDot/.Model.Drivers.AngularVelocity);
      AnyVar Semitendinosus = -1*(.Model.LegMusRef.Semitendinosus.LmtDot/.Model.Drivers.AngularVelocity);
      AnyVar Semimembranosus = -1*(.Model.LegMusRef.Semimembranosus.LmtDot/.Model.Drivers.AngularVelocity);
      AnyVar BicepsFemorisCaputLongum = -1*(.Model.LegMusRef.BicepsFemorisCaputLongum.LmtDot/.Model.Drivers.AngularVelocity);
      AnyVar BicepsFemorisCaputBreve = -1*(.Model.LegMusRef.BicepsFemorisCaputBreve.LmtDot/.Model.Drivers.AngularVelocity);
      AnyVar Sartorius = -1*(.Model.LegMusRef.Sartorius.LmtDot/.Model.Drivers.AngularVelocity);
      AnyVar Gracilis = -1*(.Model.LegMusRef.Gracilis.LmtDot/.Model.Drivers.AngularVelocity);
      AnyVar Iliopsoas = -1*(.Model.LegMusRef.Iliopsoas.LmtDot/.Model.Drivers.AngularVelocity);
      AnyVar GluteusMinimus1 = -1*(.Model.LegMusRef.GluteusMinimus1.LmtDot/.Model.Drivers.AngularVelocity);
      AnyVar GluteusMinimus2 = -1*(.Model.LegMusRef.GluteusMinimus2.LmtDot/.Model.Drivers.AngularVelocity);
      AnyVar GluteusMinimus3 = -1*(.Model.LegMusRef.GluteusMinimus3.LmtDot/.Model.Drivers.AngularVelocity);
      AnyVar GluteusMedius1 = -1*(.Model.LegMusRef.GluteusMedius1.LmtDot/.Model.Drivers.AngularVelocity);
      AnyVar GluteusMedius2 = -1*(.Model.LegMusRef.GluteusMedius2.LmtDot/.Model.Drivers.AngularVelocity);
      AnyVar GluteusMedius3 = -1*(.Model.LegMusRef.GluteusMedius3.LmtDot/.Model.Drivers.AngularVelocity);
      AnyVar GluteusMaximus1 = -1*(.Model.LegMusRef.GluteusMaximus1.LmtDot/.Model.Drivers.AngularVelocity);
      AnyVar GluteusMaximus2 = -1*(.Model.LegMusRef.GluteusMaximus2.LmtDot/.Model.Drivers.AngularVelocity);
      AnyVar GluteusMaximus3 = -1*(.Model.LegMusRef.GluteusMaximus3.LmtDot/.Model.Drivers.AngularVelocity);
      AnyVar TensorFasciaeLatae = -1*(.Model.LegMusRef.TensorFasciaeLatae.LmtDot/.Model.Drivers.AngularVelocity);
      AnyVar Piriformis = -1*(.Model.LegMusRef.Piriformis.LmtDot/.Model.Drivers.AngularVelocity);
      AnyVar AdductorLongus = -1*(.Model.LegMusRef.AdductorLongus.LmtDot/.Model.Drivers.AngularVelocity);
      AnyVar AdductorMagnus1 = -1*(.Model.LegMusRef.AdductorMagnus1.LmtDot/.Model.Drivers.AngularVelocity);
      AnyVar AdductorMagnus2 = -1*(.Model.LegMusRef.AdductorMagnus2.LmtDot/.Model.Drivers.AngularVelocity);
      AnyVar AdductorMagnus3 = -1*(.Model.LegMusRef.AdductorMagnus3.LmtDot/.Model.Drivers.AngularVelocity);
      AnyVar QuadratusFemoris  = -1*(.Model.LegMusRef.QuadratusFemoris.LmtDot/.Model.Drivers.AngularVelocity);
      AnyVar AbductorBrevis  = -1*(.Model.LegMusRef.AbductorBrevis.LmtDot/.Model.Drivers.AngularVelocity);
      AnyVar ObturatoriusInternus  = -1*(.Model.LegMusRef.ObturatoriusInternus.LmtDot/.Model.Drivers.AngularVelocity);
      AnyVar ObturatoriusExternus   = -1*(.Model.LegMusRef.ObturatoriusExternus.LmtDot/.Model.Drivers.AngularVelocity);
      AnyVar Pictineus  = -1*(.Model.LegMusRef.Pictineus.LmtDot/.Model.Drivers.AngularVelocity);
      AnyVar GemmelusInferior  = -1*(.Model.LegMusRef.GemmelusInferior.LmtDot/.Model.Drivers.AngularVelocity);
      AnyVar GemmelusSuperior  = -1*(.Model.LegMusRef.GemmelusSuperior.LmtDot/.Model.Drivers.AngularVelocity);
  };
};

AnyOperationMacro MacroCmd =
{

  MacroStr = {"operation " + CompleteNameOf(&.Study.Kinematics),
    "run"
#ifdef OUTPUT_SAVE_PATH
    ,
    "classoperation " + CompleteNameOf(&.Study.Output) + strquote("Save data")
     + " --type=" + strquote("Deep") +" --file=" + strquote(
     OUTPUT_SAVE_PATH + .OutputFileName + ".anydata.h5")
#endif
   };
 };
