// SubTalar and PatellaFemur joint added. November 2007, Karin Gorter

// Definitions of joints in the right lower extremity.
//
// // Mark de Zee
//
AnyRevoluteJoint Ankle = {
  Axis = z; //flexion extension
  //Axis2  =  x; //abduction adduction
  AnyRefNode &ShankNode = ..Seg.Shank.AnkleJoint;
  AnyRefNode &FootNode  = ..Seg.Talus.AnkleJoint;
   //ShankNode ={AnyDrawRefFrame drw={RGB={0,1,0};};};
};

AnyRevoluteJoint SubTalar = {
  //Axis1 = z; //flexion extension
  Axis =  z; //inversion eversion
  AnyRefNode &TalusNode = ..Seg.Talus.SubTalarJoint;
  AnyRefNode &FootNode  = ..Seg.Foot.SubTalarJoint;
  //TalusNode ={AnyDrawRefFrame drw={RGB={1,0,0};};};

};


AnyRevoluteJoint Knee = {
  Axis = z;
  AnyRefNode &ThighNode = ..Seg.Thigh.KneeJoint;
  AnyRefNode &ShankNode = ..Seg.Shank.KneeJoint;
}; // End of knee

AnyRevoluteJoint PatellaFemur = {
  Axis = z;
  AnyRefNode &ThighNode = ..Seg.Thigh.PatellaFemurJoint;
 // ThighNode ={AnyDrawRefFrame drw={RGB={0,1,0};};};
  AnyRefNode &PatellaNode = ..Seg.Patella.PatellaFemurJoint;

}; // End of patellafemur


//AnyUniversalJoint PatellaFemur = {
//  Axis1 = z;
//  Axis2 = x;
//  AnyRefNode &ThighNode = ..Seg.Thigh.PatellaFemurJoint;
// // ThighNode ={AnyDrawRefFrame drw={RGB={0,1,0};};};
//  AnyRefNode &PatellaNode = ..Seg.Patella.PatellaFemurJoint;
//
//};


AnyFolder KinematicMeasures = {
  AnyKinPLine Patella = {
    // These are the nodes that the measure refers to. The connection is regarded
    // as being stiff.
    AnyRefNode &Origin_patella_tendon = ...Seg.Patella.Origin_patella_tendon;
    AnyRefNode &Insertion_patella_tendon = ...Seg.Shank.Insertion_patella_tendon;


    //AnyRefNode &Insertion_patella_tendon = ...Seg.Shank.Insertion_patella_tendon;

    AnyDrawPLine Patella_tendon =
    {
      Thickness = 0.001;
      RGB = {1,0,0};
    };
  };

//    AnyKinRotational PatellaRot =
//    {
//      Type = RotAxesAngles;
//      Axis1 = z;
//      Axis2 = y;
//      Axis3 = x;
//      //Ref = 0;
//      //AngVelOnOff = Off;
//      //AngVelGlobal = Off;
//      AnyRefFrame &Femur_pjoint = ...Seg.Thigh.PatellaFemurJoint;
//      AnyRefFrame &Patella_joint = ...Seg.Patella.PatellaFemurJoint;
//    //Ref =1;
//    };
//
//  AnyKinRotational PatellaTendonRot =
//  {
//    Type = RotAxesAngles;
//    Axis1 = z;
//    Axis2 = x;
//    Axis3 = y;
//    //Ref = 0;
//    //AngVelOnOff = Off;
//    //AngVelGlobal = Off;
//    AnyRefNode &PatellaInsertionNode = ...Seg.Patella.Insertion_patella_tendon;
//    AnyRefNode &PatellaNode = ...Seg.Shank.Insertion_patella_tendon;
//    //Ref =1;
//  };


};

  // KinematicMeasures


  AnyKinEqSimpleDriver PatellaMovement = {
    AnyKinPLine &Jnt = .KinematicMeasures.Patella;

    // Scale patella tendon length based on the over all leg length
    AnyVar lengthScale = vnorm(..Seg.Thigh.HipJoint.sRel- ..Seg.Shank.AnkleJoint.sRel)
                / vnorm(..Seg.LegTDStandardParameters.HipJoint - ..Seg.LegTDStandardParameters.AnkleJoint);
    AnyVar TendonLength =  lengthScale *0.06047313;


    DriverPos = {TendonLength};
    DriverVel = {0.0};
    Reaction.Type = {On};  // The muscles must do the work
  };


//  AnyKinEq PatellaMRotation=
//  {
//    MeasureOrganizer = {2};
//    AnyKinMeasure &PatellaJnt = .KinematicMeasures.PatellaRot;
//    Reaction.Type = {On};
//  };
//


  // Defined with the femoral node first so reactions are reported in femur based reference frame.
  AnySphericalJoint Hip = {
    AnyRefNode &ThighNode = ..Seg.Thigh.HipJoint;
    AnyRefNode &PelvisNode = ..HipNodeRef;

  }; // End of Hip
