  // required input:
  // transformation matrix
//  AnyDrawNode drw = {};

  // transform landmarks by applying transformation and scaling
  AnyFloat Q1 = Scale(p[0]);
  AnyFloat Q2 = Scale(p[1]);
  AnyFloat Q3 = Scale(p[2]);
  AnyFloat Q4 = Scale(p[3]);
  AnyFloat Q5 = Scale(p[4]);

  AnyFloat Length = lengthscalefactor * vnorm(Q2 - Q1);

  // get direction from the first two points
  AnyFloat dir = (Q2 - Q1) / vnorm(Q2 - Q1);

  // projection of the points 3-5 to the plane through Q1 with normal dir
  AnyFloat Q3p = Q1 + (Q3 - Q1) - dir * (Q3 - Q1)' * dir;
  AnyFloat Q4p = Q1 + (Q4 - Q1) - dir * (Q4 - Q1)' * dir;
  AnyFloat Q5p = Q1 + (Q5 - Q1) - dir * (Q5 - Q1)' * dir;

  AnyFloat alpha = ((Q4p - Q5p) * (Q4p - Q5p)' * (Q3p - Q4p) * (Q3p - Q5p)')
                  / (2 * cross(Q3p - Q4p, Q4p - Q5p) * cross(Q3p - Q4p, Q4p - Q5p)');
  AnyFloat beta = ((Q3p - Q5p) * (Q3p - Q5p)' * (Q4p - Q3p) * (Q4p - Q5p)')
                  / (2 * cross(Q3p - Q4p, Q4p - Q5p) * cross(Q3p - Q4p, Q4p - Q5p)');
  AnyFloat gamma = ((Q3p - Q4p) * (Q3p - Q4p)' * (Q5p - Q3p) * (Q5p - Q4p)')
                  / (2 * cross(Q3p - Q4p, Q4p - Q5p) * cross(Q3p - Q4p, Q4p - Q5p)');
  AnyVec3 U = (alpha * Q3p + beta * Q4p + gamma * Q5p);

  AnyFloat Radius = vnorm(U-Q3p);
  AnyVec3 dir1 = (Q3p - U) / vnorm(Q3p - U);
  AnyVec3 dir2tmp = (Q4p - U) - (Q4p - U) * dir1' * dir1;
  AnyVec3 dir2 = dir2tmp / vnorm(dir2tmp);
  ARel = RotMat(U, U + dir1, U + dir2) * transform;
  sRel = U;
  AnySurfCylinder cyl = {
      Radius=.Radius;
      Length = .Length;
      AnyDrawParamSurf drw={RGB={1,0,0};Opacity = 0.5;Visible = Off;};
  };
