Main = {
  AnyOperationMacro LoadFootJointAxis = {
     MacroStr = {
     "classoperation Main " + strquote("Load Values")
     + " --file= " + strquote( FilePathCompleteOf(Main.ModelSetup.Files.AnkleJointParameters) )};
  };
};
